x := 3
n := -5
z := ((1 + sqrt(|1 - x|))/(x^2 - 1 + sqrt(1 + x)) + (1 - sqrt(1 + x))/(1 + x^2 - sqrt(1 + x)))/((sqrt(|1 - x|) - sqrt(1 + x))/sqrt(x^2 - 1)) = -0.562132
y := z^3 - n^2 - 8/(|z^3 - n^2| + 6) = -25.4342
